// COMSOL Multiphysics 5.0.1.276 model "Week9.mph"
// Outline of the model tree

Geometry
  geom1 "Geometry 1" (2D, length unit cm)
    sq1: Square | pos = {0, 0}; type = solid; base = corner; size = 1
    edo1: EditObject
      prob1: GeomError "Error 1"
        warning: GeomWarning | severity = warning
        warning1: GeomWarning "Warning 1" | severity = warning
    fin: Finalize "Form Union"

Materials
  mat1: Common "FR4 (Circuit Board)" on all domains
    def "Basic"
      relpermeability = 1
      electricconductivity = 0.004[S/m]
      relpermittivity = 4.5
      thermalexpansioncoefficient = 18e-6[1/K]
      heatcapacity = 1369[J/(kg*K)]
      density = 1900[kg/m^3]
      thermalconductivity = 0.3[W/(m*K)]
    Enu "Young's modulus and Poisson's ratio"
      youngsmodulus = 22e9[Pa]
      poissonsratio = 0.28
  mat2: Common "Air" (disabled) on no domains
    def "Basic"
      relpermeability = 1
      relpermittivity = 1
      dynamicviscosity = eta(T[1/K])[Pa*s]
      ratioofspecificheat = 1.4
      electricconductivity = 0[S/m]
      heatcapacity = Cp(T[1/K])[J/(kg*K)]
      density = rho(pA[1/Pa],T[1/K])[kg/m^3]
      thermalconductivity = k(T[1/K])[W/(m*K)]
      soundspeed = cs(T[1/K])[m/s]
      eta: Piecewise | arg = T; extrap = constant; pieces = {200.0, 1600.0, -8.38278E-7+8.35717342E-8*T^1-7.69429583E-11*T^2+4.6437266E-14*T^3-1.06585607E-17*T^4}
      Cp: Piecewise | arg = T; extrap = constant; pieces = {200.0, 1600.0, 1047.63657-0.372589265*T^1+9.45304214E-4*T^2-6.02409443E-7*T^3+1.2858961E-10*T^4}
      rho: Analytic | expr = pA*0.02897/8.314/T; args = {pA, T}; dermethod = manual; argders = {{pA, d(pA*0.02897/8.314/T,pA)}, {T, d(pA*0.02897/8.314/T,T)}}
      k: Piecewise | arg = T; extrap = constant; pieces = {200.0, 1600.0, -0.00227583562+1.15480022E-4*T^1-7.90252856E-8*T^2+4.11702505E-11*T^3-7.43864331E-15*T^4}
      cs: Analytic | expr = sqrt(1.4*287*T); args = T; dermethod = manual; argders = {T, d(sqrt(1.4*287*T),T)}
    RefractiveIndex
      n = 1
      ki = 0

Physics
  es: Electrostatics on all domains
    dependent variable V
    d.d = .001
    ccn1: ChargeConservation (default)
    zc1: ZeroCharge "No Charge" (default)
    init1: init "Initial Values 1" (default) | V = comp1.V
    gnd1: Ground on boundaries 1, 2, 4
    scd1: SpaceChargeDensity "Uniform" (disabled) on all domains | rhoq = 0.00001
    scd2: SpaceChargeDensity "Nonlinear1" (disabled) on all domains | rhoq = (x/0.01)^2 +sin(10*(y/0.01))
    scd3: SpaceChargeDensity "PhiDependent" on all domains | rhoq = x*y*comp1.V; harmonicPerturbation = 0
    pot1: ElectricPotential "Left" (disabled) on boundaries 1 | V0 = 1
    pot2: ElectricPotential "Top" on boundaries 3 | V0 = 1
    pot3: ElectricPotential "Right" (disabled) on boundaries 4 | V0 = y/0.01
    pot4: ElectricPotential "Bottom" (disabled) on boundaries 2 | V0 = -2
    df1: DisplacementField "Bottom_Von_Neumann" (disabled) on boundaries 2
    df2: DisplacementField "Left_Von_Neumann" (disabled) on boundaries 1 | D0 = {-0.000000005, 0, 0}

Mesh
  mesh1 "Mesh 1" (physics-controlled)
    size: MeshSizeDefault | hauto = 5

Studies
  std1 "Study 1"
    stat: Stationary
  std2 "Study 2"
    time: Transient "Time Dependent" | tlist = range(0,0.001,1)

Solver configurations
  sol1 "Solution 1" (study std1)
    v1: Variables "Dependent Variables 1"
    s1: Stationary "Stationary Solver 1"
      i1: Iterative
        ilDef: IncompleteLU
      se1: Segregated
        ssDef: SegregatedStep
  sol2 "Solution 2" (study std2)
    v1: Variables "Dependent Variables 1"
    t1: Time "Time-Dependent Solver 1" | tlist = range(0,0.001,1)
      dDef: Direct
      se2: Segregated
        ssDef: SegregatedStep | subiter = 100

Datasets
  dset1: Solution | solution = sol1
  dset2: Solution | solution = sol2

Plots
  pg1: PlotGroup2D "Electric Potential (es)" | data = dset1
    surf1: Surface | expr = V
  pg2: PlotGroup2D "Charge" | data = none
  pg3: PlotGroup2D "Electric Potential (es) 1" | data = dset2
    surf1: Surface | expr = V